# Путь функция задана таблично
# [component: outputs T]
# , где нулевая строка значения x а строка с индексом 1 значения f(x)
# Тогда ее промежуточные значения можно дополнить при помощи интерпаляционного многочлена лагранжа
P0(x) := (x - T[0, 1])*(x - T[0, 2])*(x - T[0, 3])/((T[0, 0] - T[0, 1])*(T[0, 0] - T[0, 2])*(T[0, 0] - T[0, 3]))
P1(x) := (x - T[0, 0])*(x - T[0, 2])*(x - T[0, 3])/((T[0, 1] - T[0, 0])*(T[0, 1] - T[0, 2])*(T[0, 1] - T[0, 3]))
P2(x) := (x - T[0, 0])*(x - T[0, 1])*(x - T[0, 3])/((T[0, 2] - T[0, 0])*(T[0, 2] - T[0, 1])*(T[0, 2] - T[0, 3]))
P3(x) := (x - T[0, 0])*(x - T[0, 1])*(x - T[0, 2])/((T[0, 3] - T[0, 0])*(T[0, 3] - T[0, 1])*(T[0, 3] - T[0, 2]))
# тогда интерпаляционный полином логранжа можно записать как
L(x) := (T[1, 0]*P0(x)) + (T[1, 1]*P1(x)) + (T[1, 2]*P2(x)) + (T[1, 3]*P3(x))
# тогда на некотором множестве -
#
# можно получить следующую таблицу зачений
X := 1 .. 7
L(X) = [1; 4; 9; 16; 25; 36; 49]
# где в качестве индексов строк идет значение x, с заданным индексом
